*Heading
** Job name: EL_64 Model name: Model-4
** Generated by: Abaqus/CAE 2017
*Preprint, echo=NO, model=NO, history=NO, contact=NO
**
** PARTS
**
*Part, name=Part-1
*Node, NSET=ALLNODES
      1,           1.,           1.,           1.
      2,           1.,         0.75,           1.
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*Element, type=C3D8R, ELSET=ALLELEMS
 1,  26,  27,  32,  31,   1,   2,   7,   6
 2,  27,  28,  33,  32,   2,   3,   8,   7
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*Nset, nset=Set-2, generate
   1,  125,    1
*Elset, elset=Set-2, generate
  1,  64,   1
*End Part
**
**
** ASSEMBLY
**
*Assembly, name=Assembly
**
*Instance, name=Part-1-1, part=Part-1
** Section: Section-1
*Solid Section, elset=Set-2, material=Test1.MAC,Orientation=LONG
1.,
*Hourglass Stiffness
6000., , 0., 0.
**ORIENTATION, NAME=LONG
** 0.0, -1.0, 0.0, 1.0, 0.0, 0.0
*Orientation, name=LONG
          0.,           1.,           0.,           1.,           0.,           0.
3, 0.
*End Instance
**
*Nset, nset=Set-1, instance=Part-1-1, generate
 101,  125,    1
*Elset, elset=Set-1, instance=Part-1-1, generate
 49,  64,   1
*Nset, nset=Set-2, instance=Part-1-1, generate
  1,  25,   1
*Elset, elset=Set-2, instance=Part-1-1, generate
  1,  16,   1
*End Assembly
**
** MATERIALS
**
*MATERIAL,NAME=Test1.MAC
*USER MATERIAL, CONSTANTS=0
*DEPVAR
  21
**EXPANSION, TYPE=ANISO, USER
**INITIAL CONDITIONS, TYPE=TEMPERATURE
**Part-1-1.ALL, 19.999
**INITIAL CONDITIONS, TYPE=SOLUTION, USER
** ----------------------------------------------------------------
**
** STEP: Step-1
**
*Step, name=Step-1, INC=10000
*Static
10.,100.,1e-10,10.
**
** BOUNDARY CONDITIONS
**
** Name: BC-1 Type: Symmetry/Antisymmetry/Encastre
*Boundary
Set-1, XSYMM
** Name: BC-2 Type: Displacement/Rotation
*Boundary
Set-2, 1, 1, 0.03
**
**TEMPERATURE
**Part-1-1.ALL, 250.00001
** OUTPUT REQUESTS
**
*Restart, write, frequency=0
**
** FIELD OUTPUT: F-Output-1
**
*Output, field, variable=PRESELECT
**
*ELEMENT OUTPUT
SDV
**SDV27, TEMP
** HISTORY OUTPUT: H-Output-1
**
*Output, history, variable=PRESELECT
*End Step
