*Heading
** Job name: Crossply_meso_100elements Model name: Model-1
** Generated by: Abaqus/CAE 2022
*Preprint, echo=NO, model=NO, history=NO, contact=NO
** ----------------------------------------------------------------
**
** PART INSTANCE: Inst_Laminate
**
*Node
      1, -0.914399981, -0.457199991,  0.182879999
      2, -0.914399981,  0.457199991,  0.182879999
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*Element, type=C3D8R
 1,  40,  85, 101,  33,   1,  17,  24,   4
 2,  85,  86, 102, 101,  17,  18,  23,  24
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*Nset, nset=Inst_Laminate_Set_0_plies
   1,   2,   5,   8,   9,  10
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*Elset, elset=Inst_Laminate_Set_0_plies, generate
  51,  100,    1
*Nset, nset=Inst_Laminate_Set_90_plies
   1,   2,   3,   4,   5,   6
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*Elset, elset=Inst_Laminate_Set_90_plies, generate
  1,  50,   1
*Nset, nset=Inst_Laminate_Set_ALL, generate
   1,  180,    1
*Elset, elset=Inst_Laminate_Set_ALL, generate
   1,  100,    1
*Orientation, name=Inst_Laminate-Ori-2
1., 0., 0., 0., 1., 0.
3, 90.
** Region: (Sec_LAMINA:Set_ALL), (Controls:EC-1), (Material Orientation:Set_90_plies)
*Elset, elset=Inst_Laminate__I1, generate
  1,  50,   1
** Section: Sec_LAMINA
*Solid Section, elset=Inst_Laminate__I1, orientation=Inst_Laminate-Ori-2, controls=EC-1, material=Mat_LAMINA
,
*Orientation, name=Inst_Laminate-Ori-1
1., 0., 0., 0., 1., 0.
1, 0.
** Region: (Sec_LAMINA:Set_ALL), (Controls:EC-1), (Material Orientation:Set_0_plies)
*Elset, elset=Inst_Laminate__I2, generate
  51,  100,    1
** Section: Sec_LAMINA
*Solid Section, elset=Inst_Laminate__I2, orientation=Inst_Laminate-Ori-1, controls=EC-1, material=Mat_LAMINA
,
*System
*Nset, nset=Set_X0
   1,   2,   3,   4,   9,  10
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*Elset, elset=Set_X0
  1,  2,  3,  4,  5, 26
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*Nset, nset=Set_X1
   5,   6,   7,   8,  13,  14
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*Elset, elset=Set_X1
  21,  22,  23,  24,  25,  46
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**
** ELEMENT CONTROLS
**
*Section Controls, name=EC-1, hourglass=ENHANCED
1., 1., 1.
*Amplitude, name=Amp_Loading, definition=SMOOTH STEP
             0.,              0.,              2.,              2.
**
** MATERIALS
**
*Material, name=Mat_LAMINA
*Density
 1.5e-09,
*Depvar, delete=7
      8,
*User Material, constants=5
160000.,9000.,5700., 0.32, 0.44
**
** BOUNDARY CONDITIONS
**
** Name: BC_X0 Type: Displacement/Rotation
*Boundary
Set_X0, 1, 1
** ----------------------------------------------------------------
**
** STEP: Step_Loading
**
*Step, name=Step_Loading, nlgeom=YES
*Dynamic, Explicit
, 1.
*Bulk Viscosity
0.06, 1.2
** Mass Scaling: Semi-Automatic
**               Whole Model
*Variable Mass Scaling, dt=1e-05, type=below min, frequency=10
**
** BOUNDARY CONDITIONS
**
** Name: BC_X1 Type: Displacement/Rotation
*Boundary, amplitude=Amp_Loading
Set_X1, 1, 1, 0.036576
**
** OUTPUT REQUESTS
**
*Restart, write, number interval=1, time marks=NO
**
** FIELD OUTPUT: F-Output-1
**
*Output, field
*Node Output
U,
*Element Output, directions=YES
LE, S, SDV, STATUS
**
** HISTORY OUTPUT: H-Output-1
**
*Output, history, variable=PRESELECT
*End Step
