*Heading
** Job name: RUC_simple_Sensor_VUAMP Model name: Model-1
** Generated by: Abaqus/CAE 2022
*Preprint, echo=NO, model=NO, history=NO, contact=NO
**
** PARTS
**
*Part, name=Part-1
*Node
      1,           0., 0.00322349486, 0.00298325671
      2,           0., 0.00322349486, 0.00558325648
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*Element, type=C3D8R
  1,   35,    1,   53,  357,  450,   58,  433, 1061
  2,  378,  358,  381,  379, 1082, 1062, 1085, 1083
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*Nset, nset=setx0
    1,    2,    3,    7,    9,   14
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*Elset, elset=setx0
    1,    2,    3,    4,    5,    6
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*Nset, nset=setx1
    4,    5,    6,    8,   10,   11
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*Elset, elset=setx1
   79,   80,   81,   82,   83,   84
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*Nset, nset=sety0
   11,   13,   15,   16,   30,   31
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*Elset, elset=sety0
  421,  434,  450,  458,  471,  487
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*Nset, nset=sety1
   18,   19,   20,   22,   24,   25
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*Elset, elset=sety1
  544,  545,  560,  582,  583,  598
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*Nset, nset=setz0
   23,   25,   27,   28,   29,   31
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*Elset, elset=setz0
  658,  668,  676,  692,  702,  710
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*Nset, nset=setz1
   12,   13,   14,   16,   17,   19
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*Elset, elset=setz1
  432,  434,  449,  469,  471,  486
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*Nset, nset=setFiber, generate
    1,  1476,     1
*Elset, elset=setFiber, generate
   1,  864,    1
*Nset, nset=setMatrix
    1,    3,    5,    6,    7,    8
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*Elset, elset=setMatrix, generate
  865,  2394,     1
*Orientation, name=Ori-1
          1.,           0.,           0.,           0.,           1.,           0.
3, 0.
** Section: sectionFiber
*Solid Section, elset=setFiber, orientation=Ori-1, controls=EC-1, material=materialFiber
,
** Section: sectionMatrix
*Solid Section, elset=setMatrix, controls=EC-1, material=materialMatrix
,
*End Part
**
**
** ASSEMBLY
**
*Assembly, name=Assembly
**
*Instance, name=Part-1-1, part=Part-1
*End Instance
**
*Node
      1, 0.00260000001,           0.,           0.
*Node
      2,           0., 0.00644698972,           0.
*Node
      3,           0.,           0.,  0.011166513
*Nset, nset=setrpx
 1,
*Nset, nset=setrpy
 2,
*Nset, nset=setrpz
 3,
** Constraint: Constraint-X1
*Equation
2
Part-1-1.setx1, 1, 1.
setrpx, 1, -1.
** Constraint: Constraint-Y1
*Equation
2
Part-1-1.sety1, 2, 1.
setrpy, 2, -1.
** Constraint: Constraint-Z1
*Equation
2
Part-1-1.setz1, 3, 1.
setrpz, 3, -1.
*End Assembly
**
** ELEMENT CONTROLS
**
*Section Controls, name=EC-1, hourglass=ENHANCED
1., 1., 1.
*Amplitude, name=amp_11, definition=USER, variables=1
*Amplitude, name=amp_22, definition=USER, variables=1
*Amplitude, name=amp_33, definition=USER, variables=1
**
** MATERIALS
**
*Material, name=materialFiber
*Density
 1.5e-09,
*Elastic, type=ENGINEERING CONSTANTS
264534.,  13731.2,  13731.2, 0.282545, 0.282545, 0.304869,  48323.6,  48323.6
  5261.53,
*Material, name=materialMatrix
*Density
 1.5e-09,
*Elastic
4670., 0.37
*Plastic
 24.8004,       0.
 24.9638,  4.3e-05
 25.1441,  8.5e-05
 25.3241, 0.000128
  25.504,  0.00017
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 178.576, 0.460421
*Time Points, name=TimePoints-1
0.25, 0.5, 0.75, 1.
**
** BOUNDARY CONDITIONS
**
** Name: BC-X0 Type: Displacement/Rotation
*Boundary
Part-1-1.setx0, 1, 1
** Name: BC-Y0 Type: Displacement/Rotation
*Boundary
Part-1-1.sety0, 2, 2
** Name: BC-Z0 Type: Displacement/Rotation
*Boundary
Part-1-1.setz0, 3, 3
** ----------------------------------------------------------------
**
** STEP: Step-1
**
*Step, name=Step-1, nlgeom=YES
*Dynamic, Explicit
, 1.
*Bulk Viscosity
0.06, 1.2
** Mass Scaling: Semi-Automatic
**               Whole Model
*Variable Mass Scaling, dt=1e-05, type=below min, frequency=10
**
** BOUNDARY CONDITIONS
**
** Name: BC-1 Type: Displacement/Rotation
*Boundary, amplitude=amp_11
setrpx, 1, 1, 1.
** Name: BC-2 Type: Displacement/Rotation
*Boundary, amplitude=amp_22
setrpy, 2, 2, 1.
** Name: BC-3 Type: Displacement/Rotation
*Boundary, amplitude=amp_33
setrpz, 3, 3, 1.
**
** OUTPUT REQUESTS
**
*Restart, write, number interval=1, time marks=NO
**
** FIELD OUTPUT: F-Output-1
**
*Output, field, time points=TimePoints-1
*Node Output
U,
*Element Output, directions=YES
E, MISESMAX, S
**
** HISTORY OUTPUT: SENSOR_11
**
*Output, history, sensor, name=SENSOR_11, frequency=1
*Node Output, nset=setrpx
RF1,
**
** HISTORY OUTPUT: SENSOR_22
**
*Output, history, sensor, name=SENSOR_22, frequency=1
*Node Output, nset=setrpy
RF2,
**
** HISTORY OUTPUT: SENSOR_33
**
*Output, history, sensor, name=SENSOR_33, frequency=1
*Node Output, nset=setrpz
RF3,
**
** HISTORY OUTPUT: H-Output-1
**
*Output, history, time interval=0.002
*Node Output, nset=setrpx
RF1, RF2, RF3, U1, U2, U3
**
** HISTORY OUTPUT: H-Output-2
**
*Node Output, nset=setrpy
RF1, RF2, RF3, U1, U2, U3
**
** HISTORY OUTPUT: H-Output-3
**
*Node Output, nset=setrpz
RF1, RF2, RF3, U1, U2, U3
*End Step
